# Модель Шумана
# Исходные данные:
# Кол-во машинных команд (строк)
I := 2000
# Кол-во ошибок после отладки
M := 15
# Кол-во дней тестирования
t := 20
# Кол-во обнаруженных ошибок после тестирования
x := 5
# Коэффициент пропорциональности
C1 := 0.7
# Решение
# 1) Расчитываем кол-во ошибок в расчете на одну команду в машинном языке
E1 := x/I
E1 = 0.0025
# 2) Расчитываем удельное число ошибок на одну машинную команду, оставшихся в системе после времени тестирования
E2 := M/I - E1
E2 = 0.005
# 3) Расчитываем вероятность безотказной работы на интервале от 0 до t
P := e^(-C1*((M/I) - E1)*t)
P = 0.932394
# 4) Расчитываем среднее время безошибочной работы программы
tcp := 1/(C1*((M/I) - E1))
M/I = 0.0075
(M/I) - E1 = 0.005
tcp = 285.714
# 5) Расчитываем интенсивность отказов программы
λ := C1*E2
λ = 0.0035
